# Simple Bearings Rigidity Calculator
# No loads applied except axial preload
E' := 215*GPa
# for metal-to-metal contact
k_440C := 20*W/(m*K)
D_b := 1.191*mm  # ball diameter
m_b := 1*gm
Z_b := 9  # number of balls
C_p := 500*J/(kg*K)
α := 15*deg  # contact angle
F_p := 15*N  # axial preload force
------------------------------------------------------
# Equivalent radius
R_b := D_b/2
r_g := 0.53*D_b  # groove radii
R_x1 := R_b
R_x2 := ∞*mm
R_y1 := R_x1
R_y2 := -r_g
A := 1/R_x1 + 1/R_x2
B := 1/R_y1 + 1/R_y2
R_x := 1/A
R_y := 1/B
R_e := 1/(A + B)
κ := R_y/R_x
# Hertz Delection Law
C := 4/3*E'*sqrt(R_e)
δ(Q) := (Q/C)^(2/3)
# Rigidity
Q_i := F_p/(Z_b*sin(α)) = 6.43951 N
δ_i := δ(Q_i) = 0.963815 μm
k_n := 3/2*Q_i/δ_i
k_r := Z_b*k_n*cos(α)^2 = 84.155 N/μm
k_a := Z_b*k_n*sin(α)^2 = 6.04206 N/μm
# Contact Area
a_c := (3*Q_i*R_e/(4*E'))^(1/3)
a_c = 23.3067 μm
A_c := Z_b*π*a_c^2 = 0.0153587 mm^2
p_max := 3*Q_i/(2*π*a_c^2) = 5.66018 GPa
p_mean := Q_i/(π*a_c^2) = 3.77346 GPa
# Thermal Contudctivity | Thermal Mass
C_th := k_440C*A_c/D_b = 0.257913 mW/K
m_th := m_b*C_p*170 K = 85 J
Q_loss := C_th*170 K = 43.8453 mW
71.5 + 44 = 115.5
